// test_simple.glm

#set suppress_repeat_messages=FALSE
module pypower
{
	autosize_angle 60 deg;
	save_case TRUE;
}

#define BASEKV=69.0 kV

object bus
{
	latitude 37.0;
	longitude -122.0;
    name "bus_1";
    type 3;
    object gen
    {
        name "gen_1";
        Pg 20 MW;
        Qg 2 MVAr;
        Pmax 25 MW;
        Qmin -10 MVAr;
        Qmax +10 MVAr;
        status 1;
    };
    baseKV ${BASEKV};
}

object bus
{
	latitude 37.1;
	longitude -122.0;
    type 1;
    name "bus_2";
    baseKV ${BASEKV};
}

object bus
{
	latitude 37.2;
	longitude -122.1;
    name "bus_3";
    type 1;
    Pd 10 MW;
    Qd 1 MVAr;
    baseKV ${BASEKV};
}

object bus
{
	latitude 37.2;
	longitude -122.2;
    name "bus_4";
    type 1;
    Pd 10 MW;
    Qd 1 MVAr;
    baseKV ${BASEKV};
}

object branch
{
	from "bus_1";
	to "bus_2";
	rateA 500 MVA;
	status IN;
}

object branch
{
	from "bus_2";
	to "bus_3";
	rateA 200 MVA;
	status IN;
}

object branch
{
	from "bus_2";
	to "bus_4";
	rateA 200 MVA;
	status IN;
}

module assert;
object assert
{
	parent "gen_1";
	target "Pg";
	relation "==";
	value 20.0645 MW;
	within 0.001;
}
object assert
{
	parent "gen_1";
	target "Qg";
	relation "==";
	value 2.67203 MVAr;
	within 0.001;
}

#set savefile=test_simple.json
