#define CASE=14
#ifexists "../case.glm"
#define DIR=..
#endif

module pypower
{
#ifdef DIR
    controllers_path "${DIR}";
#endif
    controllers "controllers";
}

object pypower.load
{
    parent pp_bus_2;
    Vn 12.5 kV;
    status ONLINE;
    controller "load_control";
}

object pypower.powerplant
{
    parent pp_bus_2;
    status ONLINE;
    controller "powerplant_control";
}

object pypower.relay
{
    parent pp_branch_1;
    status CLOSED;
    controller "relay_control";
}

object pypower.scada
{
    point pp_bus_3.Va;
    point pp_bus_4.Va;
    record TRUE;
}

#include "${DIR:-.}/case.glm"

clock
{
    timezone "PST+8PDT";
    starttime "2020-01-01 00:00:00 PST";
    stoptime "2020-01-02 00:00:00 PST";
}
