#define CASE=14
#ifexists "../case.glm"
#define DIR=..
#endif

module pypower
{
    maximum_timestep 3600;
}

module powerflow;
object pypower.load
{
    name load_1;
    parent pp_bus_0;
    Vn 12.5 kV;
    object substation
    {
        phases ABC;
        bustype SWING;
        nominal_voltage 12.5 kV;
        base_power ${pypower::baseMVA};
        power_convergence_value 0.01;
    };
}

#include "${DIR:-.}/case.glm"
