#set pythonpath=..:.
module test_fast_accessor;

class test
{
    double x;
    complex z;
    int16 i;
    int32 j;
    int64 k;
    bool b;
}

object test
{
    on_init "python:test_fast_accessor.test_init";
}

#set savefile=test_fast_accessor.json
