// File: test_json_conversion.glm
//
// This autotest verifies that a GLM converted to JSON and back to GLM
// produces the same output as the original GLM
//

class test
{
	double x;
}

object test
{
	x 1.23;
}

#set savefile=test_json_conversion_opt.json

#if CHECK == TRUE
#on_exit 0 diff test_json_conversion.json -o test_json_conversion_opt.json > gridlabd.diff
#else
#on_exit 0 gridlabd -D check=TRUE test_json_conversion_opt.json -o test_json_conversion_opt.glm
#endif
