// test geodata create and merge directives

#ifexist "../test_geodata.txt"
#define DIR=..
#endif

#option redirect output:test_geodata.txt

#geodata help

#flush
#system sync

#ifexist "../test_geodata.txt"
#on_exit 0 diff -I '^#' ../test_geodata.txt test_geodata.txt > gridlabd.diff
#endif
