#ifdef USER
#ifexist "../${modelname/.glm/.txt}"
#define DIR=..
#endif

#option redirect output:${modelname/.glm/.txt}

#project help

#flush
#system sync

#on_exit 0 test -f ${modelname/.glm/.txt}
#endif
